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v_1 := [5; 0; 0]
v_2 := [7; 2; -6]
v_3 := [9; 4; -8]
A := rref(augment(v_1, v_2, v_3)) → [1, 0, 0; 0, 1, 0; 0, 0, 1]  # alle er linæere uafhængige
v_1 := [0; 0; 2]
v_2 := [0; 5; -8]
v_3 := [-3; 4; 1]
A := rref(augment(v_1, v_2, v_3)) → [1, 0, 0; 0, 1, 0; 0, 0, 1]  # alle er linæere uafhængige
v_1 := [1; -3]
v_2 := [-3; 9]
A := rref(augment(v_1, v_2)) → [1, -3; 0, 0]  # alle er IKKE linæere uafhængige
v_1 := [-1; 4]
v_2 := [-2; -8]
A := rref(augment(v_1, v_2)) → [1, 0; 0, 1]  # alle er linæere uafhængige
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rref([0, -8, 5; 3, -7, 4; -1, 5, -4; 1, -3, 2]) → [1, 0, 0; 0, 1, 0; 0, 0, 1; 0, 0, 0]
rref([-4, -3, 0; 0, -1, 4; 1, 0, 3; 5, 4, 6]) → [1, 0, 0; 0, 1, 0; 0, 0, 1; 0, 0, 0]
rref([1, 4, -3, 0; -2, -7, 5, 1; -4, -5, 7, 5]) → [1, 0, 0, -3; 0, 1, 0, 0; 0, 0, 1, -1]
rref([1, -3, 3, -2; -3, 7, -1, 2; 0, 1, -4, 3]) → [1, 0, -9, 0; 0, 1, -4, 0; 0, 0, 0, 1]
