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# Skriv funktionerne op for hver x værdi. og i det at x=4 er kontinueret skal den skrives ind 2 gange en for hver interval den er med i
a_0 + x*a_1 + x^2*a_2 == y(x)  # 2<=x<=4
b_0 + x*b_1 + x^2*b_2 == y(x)  # 4<=x<=6
a_0 + 2*a_1 + 4*a_2 == 1  # x=2
a_0 + 4*a_1 + 16*a_2 == 2  # x=4
b_0 + 4*b_1 + 16*b_2 == 2  # x=4
b_0 + 6*b_1 + 36*b_2 == 7  # x=6
# Fordi den er kontinueret ved x=4, kan vi sige at den afledte funktions resultat for begge intervaller, ved den samme x-værdi, er det samme
a_1 + 2*x*a_2 == y(x)  # 2<=x<=4
b_1 + 2*x*b_2 == y(x)  # 4<=x<=6
a_1 + 2*x*a_2 == b_1 + 2*x*b_2  # x=4  # =>  # a_1 + 8*a_2 == b_1 + 8*b_2=>a_1 + 8*a_2 - (b_1 + 8*b_2) == 0
# Det er givet at y'(2) == 0
# a_1 + 2*a_2*2 == 0 => a_1 + 4*a_2 == 0
# De 6 udregnigner sættes ind i en matrice til at forme en augmented matrix
A := [
    1, 2, 4, 0, 0, 0, 1;
    1, 4, 16, 0, 0, 0, 2;
    0, 0, 0, 1, 4, 16, 2;
    0, 0, 0, 1, 6, 36, 7;
    0, 1, 8, 0, -1, -8, 0;
    0, 1, 4, 0, 0, 0, 0
]
rref(A) → [
    1, 0, 0, 0, 0, 0, 2;
    0, 1, 0, 0, 0, 0, -1;
    0, 0, 1, 0, 0, 0, 1/4;
    0, 0, 0, 1, 0, 0, 10;
    0, 0, 0, 0, 1, 0, -5;
    0, 0, 0, 0, 0, 1, 3/4
]
y(x) :=
    if 2 ≤ x ≤ 4
        2 + (-x) + 0.25*x^2
    if 4 ≤ x ≤ 6
        10 + (-5*x) + 0.75*x^2
# [plot: y(x) vs x]
