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# 1)
[cos(ψ), -sin(ψ); sin(ψ), cos(ψ)]*[cos(θ), -sin(θ); sin(θ), cos(θ)] simplify → [cos(ψ + θ), -sin(ψ + θ); sin(ψ + θ), cos(ψ + θ)]
# 2)
C := [3, -4; 4, 3]
C == [a, -b; b, a]
a := 3
b := 4
r := sqrt(a^2 + b^2) = 5  # <--scaling value
tan(4/3)^-1 = 0.242029  # <--rotation value
C == [a, -b; b, a] == [r, 0; 0, r]*[cos(ψ), -sin(ψ); sin(ψ), cos(ψ)]  # <--Skrevet som scalering og rotering
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u_1 := [1; 2; 1]
u_2 := [1; 1; 1]
y := [4; 0; 0]
v_1 := u_1
v_2 := u_2 - u_2*u_1/(u_1*u_1)*u_1 = [0.333333; -0.333333; 0.333333]
# Bruger Gram-Schmidt algoritment til at finde ortogonal basisen af u1 på u2
# 2)
y_hat := y*v_1/(v_1*v_1)*v_1 + y*v_2/(v_2*v_2)*v_2 = [2; 0; 2]
