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A := [1, 1, 1; 1, 1, 0; 1, 1, 0]
x := [1; 0; 1]
# You have to use arithmetics for the binary version of the matrix. You have have to multiply every entry in a row with the corrisponding entry in the vector
# [1*1 + 1*0 + 1*1; 1*1 + 1*0 + 0*1; 1*1 + 1*0 + 0*1]->[1 + 0 + 1; 1 + 0 + 0; 1 + 0 + 0]->[0; 1; 1] == Ax
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# [1, 1, 1, 0; 1, 1, 0, 0; 1, 1, 0, 0]~[1, 1, 1, 0; 1, 1, 0, 0; 0, 0, 0, 0]~[1, 1, 1, 0; 0, 0, 1, 0; 0, 0, 0, 0]~[1, 1, 0, 0; 0, 0, 1, 0; 0, 0, 0, 0]
# First: r3+r2
# Second: r2+r1
# Third: r1+r2
# The rank is 2 because we got to pivot columns. The first column and one in hte third.
