# August midtvejstest
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A := [3, 3, 3, 6; 2, 1, 2, 1; 1, 2, 1, 5]
b := [3; -1; 4]
AAugmented := [3, 3, 3, 6, 3; 2, 1, 2, 1, -1; 1, 2, 1, 5, 4]
rref(AAugmented) = [1, 0, 1, -1, -2; 0, 1, 0, 3, 3; 0, 0, 0, 0, 0]
x_1 + 0*x_2 + x_3 + (-x_4) == -2 solve, x_1 → x_4 - x_3 - 2
0*x_1 + x_2 + 0*x_3 + 3*x_4 == 3 solve, x_2 → 3 - 3*x_4
x_3 == free
x_4 == free
[x_1; x_2; x_3; x_4] == [-2; 3; 0; 0] + x_3*[-1; 0; 1; 0] + x_4*[1; -3; 0; 1]
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v_1 := [1; -1; 2]
v_2 := [2; 1; 1]
v_3 := [0; -3; 3]
v_4 := [1; 2; -1]
A := rref(augment(v_1, v_2, v_3, v_4)) → [1, 0, 2, -1; 0, 1, -1, 1; 0, 0, 0, 0]
1*x_1 + 2*x_3 - 1*x_4 == 0 solve, x_1 →  # error: No solution was found.
x_2 - x_3 + x_4 == 0 solve, x_2 → x_3 - x_4
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A := [1, 2; -3, α]
# et theorem fortæller os at vi udregner det i en 2*2 matrix via a*d - b*c.
# sætter vi den lig 0 og solver for α kan vi finde den værdien for α, hvor determinanten er 0, er α == -6. Er determinanten 0 betyder det at matricen ikke er invertibel. For alle andre værdier af α er den invertibel
1*α - 2*(-3) → α + 6
# man kan sætte det op som en funktion og se hvornår funktionen krydser x-aksen
α + 6 == 0 solve, α → -6
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# 1) | 2)
AX + BX == 2*X + C
XA + 3*I == B
A*X + B*X - 2*X == C
XA == B - 3*I
(A + B - 2*I)*X == C
XA == B*I - 3*I
X == C*(A + B - 2*I)^-1
XA == (B - 3)*I
X == (B - 3)*I*A^-1
X == (B - 3)*A^-1
X == B*A^-1 - 3*A^-1
