# 1)
A := [1, 0; 0, -3]
B := [-3, 0; 0, 0]
C := [2, 3; 0, 2]
D := [3, 0; 8, 3]
transpose(A)*A = [1, 0; 0, 9]
transpose(B)*B = [9, 0; 0, 0]  # Største tal er den første eigenvalue, som bliver til den første singularvalue
eigenvals(transpose(A)*A) = [9; 1]
eigenvals(transpose(B)*B) = [9; 0]
Aσ1 := sqrt(9) = 3
Bσ1 := sqrt(9) = 3
Aσ2 := sqrt(1) = 1
Bσ2 := sqrt(0) = 0
transpose(C)*C = [4, 6; 6, 13]
transpose(D)*D = [73, 24; 24, 9]
eigenvals(transpose(C)*C) = [16; 1]
eigenvals(transpose(D)*D) = [81; 1]
Cσ1 := sqrt(16) = 4
Dσ1 := sqrt(81) = 9
Cσ2 := sqrt(1) = 1
Dσ2 := sqrt(1) = 1
# SVD:
# opg5 chapter 7.4
E := [-2, 0; 0, 0]
transpose(E)*E = [4, 0; 0, 0]
eigenvals(transpose(E)*E) = [4; 0]  # <-- eigenvals
Eσ_1 := sqrt(4) = 2
Eσ_2 := sqrt(0) = 0  # <-- singular
eigenvecs(transpose(E)*E) = [1, 0; 0, 1]  # <-- eigenvecs as matrix = V
v_1 := [1; 0]
v_2 := [0; 1]
V := [1, 0; 0, 1]
# Take the singularvalues and make matrix Σ by making a diagonal matrix with the eigenvalues
Σ := [Eσ_1, 0; 0, Eσ_2] → [2, 0; 0, 0]
# We can now try to find the vector columns for matrix U by using the below equation
u_1 := 1/Eσ_1*E*v_1 = [-1; 0]
u_2 := 1/Eσ_2*E*v_2  # error: This expression is divided by zero. It cannot be computed.  # <-- can't divide by 0 so u2 is zero
# To find u2 in this case, you have to extend the vector u1 to form a orthonormal basis for R2. in short: make it symmetric and diagonal.
# Therefore U will be as below
U := [-1, 0; 0, 1]  # <-- u2 is therefor [0; 1]
E == U*Σ*transpose(V)
E = [-2, 0; 0, 0]
# <-- We succeded in finding SVD
U*Σ*transpose(V) = [-2, 0; 0, 0]
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# Ud fra de givet matricer kan vi finde A ved at bruge formlen A == U*Σ*transpose(V)
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# opg 7
F := [2, -1; 2, 2]
transpose(F)*F = [8, 2; 2, 5]
eigenvals(transpose(F)*F) = [9; 4]
sqrt(9) = 3
sqrt(4) = 2
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G := [3, -3; 0, 0; 1, 1]
transpose(G)*G = [10, -8; -8, 10]
eigenvals(transpose(G)*G) = [18; 2]
sqrt(18) = 4.24264
sqrt(2) = 1.41421
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A_ := [0.40, -0.78, 0.47; 0.37, -0.33, -0.87; -0.84, -0.52, -0.16]
rref(A_) → [1.0, 0.0, 0.0; 0, 1.0, 0.0; 0, 0, 1.0]  # A har rank 3
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